# Лабораторная работа 1 "Приближённые методы решения нелинейных скалярных уравнений"
# Гордеев Никита, группа 22307, вариант 7
# 1) График f(x), окрестности корня
f(x) := tan(x/2) - x^3
# [plot: f(x) vs x]
f(x) := tan(x/2) - x^3
a := -1
b := 1
x := a, a + 0.1 .. b
# [plot: f(x) vs x]
f1(x) := d/dx(f(x))
a := -10
b := 10
x := a, a + 0.1 .. b
# [plot: f1(x) vs x]
f1(x) := d/dx(f(x))
a := -4
b := 4
x := a, a + 0.1 .. b
# [plot: f1(x) vs x]
# 2) Приближенное решение, функцией root
t := 1
t := root(f(t), t)
t = 0.723184
# 3) Приближённое решение итерационным методом
# Метод простых итераций
M := 13
m := 2
τ := 2/M
n := 9
k := 0 .. n
y[0] := 1
y[k + 1] := y[k] - τ*f(y[k])
y = [1; 1.0698; 1.16701; 1.30995; 1.53761; 1.94806; 2.85896; 5.37265; 29.307; 3902.16; 9.14119e9]
# метод Ньютона
# Для решения данной задачи методом Ньютона необходимо задать начальное приближение x0 = 1.
x_0 := 1
# Вычисляем значение функции и ее производной в точке x₀:
f1(x) := d/dx(f(x)) → (tan(x/2)^2 + 1)/2 - 3*x^2
# Вычисляем следующую точку x1 по формуле метода Ньютона
x_1 := x_0 - f(x_0)/f1(x_0) → -(2*tan(1/2) - 2)/(tan(1/2)^2 - 5) + 1
# Итеративно вычисляем следующие точки x2, x3, ..., пока не достигнем заданной точности
x_2 := x_1 - f(x_1)/f1(x_1) → (tan(((2*tan(1/2) - 2)/(tan(1/2)^2 - 5) - 1)/2) + (-(2*tan(1/2) - 2)/(tan(1/2)^2 - 5) + 1)^3)/((tan(((2*tan(1/2) - 2)/(tan(1/2)^2 - 5) - 1)/2)^2 + 1)/2 - 3*(-(2*tan(1/2) - 2)/(tan(1/2)^2 - 5) + 1)^2) + (1 - (2*tan(1/2) - 2)/(tan(1/2)^2 - 5)) = 0.734615
x_3 := x_2 - f(x_2)/f1(x_2) → 0.723444267948 = 0.723444
x_4 := x_3 - f(x_3)/f1(x_3) → 0.723183948861 = 0.723184
x_5 := x_4 - f(x_4)/f1(x_4) → 0.723183808775 = 0.723184
# Используя итерационный метод Ньютона, нашли приближенное решение уравнения x = 0.723
# 4) Демонстрация отсутствия сходимости при ненадлежащем выборе начального приближения
M1 := 13
m1 := 1
τ1 := 2/M
n1 := 9
k1 := 0 .. n
y1[0] := 10
y1[k + 1] := y1[k] - τ*f(y1[k])  # error: Не удается выполнить точный расчет для одного или нескольких указанных значений, т. к. значения находятся за пределами диапазона точности функции.
y1 =  # error: Эта переменная не определена. Проверьте правильность установки обозначения.
# 5) Модуль разности приближённых значений п.2 и 3
s[k] := |y[k] - t| = [0.276816; 0.346616; 0.443821; 0.586769; 0.814425; 1.22488; 2.13578; 4.64947; 28.5838; 3901.44]
# 6) Оценка погрешности приближённых решений
z[k] := |f(y[k])/m| = [0.226849; 0.315918; 0.46458; 0.739881; 1.33396; 2.96043; 8.16949; 77.7866; 12586.8; 2.97089e10]
# 7) Сравнение результатов п.5 и 6.
k := 0 .. 6
# [plot: z[k], s[k] vs k]
